# Do not change "units metal" for CrySPY
units  metal

# Setup simulation box
boundary  p p p
box  tilt large

# Setup atoms
# "read_data data.si" --> "lammps_data = data.si" in "cryspy.in"
atom_style  atomic
read_data  data.lmp

variable elem string "Cu Ag Au Pt"

# Setup force field
# If you use a potential file, you should write the file name in cryspy.in like "lammps_potential = SiO.tersoff"
pair_style meam
#pair_coeff * * ./../../library_1nn.meam ${elem} NULL ${elem}
pair_coeff * * ./../../library_1nn.meam ${elem} ./../../1nn.meam ${elem}
# Some elements cannot be calculated if "rc" is not within an appropriate range. In such cases, 1nn.meam is used to set rc.
# I personally set rc = 5.5 for the elements I fitted, because it is applicable to a large number of elements.

# Setup output
thermo  1
thermo_style  custom step etotal fmax vol press
dump  struc  all atom 1 log.struc

# optimize cell
fix 1 all box/relax  aniso 0.0 vmax 0.005

# Minimize
min_style  cg
minimize  0 1e-3 1000 100000
